folder Simulations: version=36
  simulation Canopy-edited
    metfile met: filename=%apsim%/Examples/MetFiles/Dalby.met
    clock
      start_date = 1/01/1988  # Select the start date of the simulation
      end_date = 31/12/1988  # Select the end date of the simulation
    summaryfile
    area paddock
      Soil No000 SampleBlackVertosol (No000): Site=Generic; Region=South East Queensland; State=NSW
        Comment = estimated cotton LL  # Comments
        SoilType = Black Vertosol  # Soil description
        NearestTown = Generic
        Water
          Thickness  BD     AirDry  LL15   DUL    SAT
          150        1.020  0.150   0.290  0.540  0.590
          150        1.030  0.230   0.290  0.530  0.580
          300        1.020  0.290   0.290  0.540  0.590
          300        1.020  0.290   0.290  0.540  0.580
          300        1.060  0.290   0.290  0.520  0.570
          300        1.110  0.290   0.290  0.500  0.550
          300        1.120  0.290   0.290  0.500  0.550
          300        1.150  0.290   0.290  0.480  0.530
          300        1.180  0.290   0.290  0.470  0.520
          300        1.200  0.290   0.290  0.460  0.510
          300        1.250  0.290   0.290  0.440  0.490
          SoilCrop wheat
            LL=[0.290, 0.290, 0.320, 0.320, 0.350, 0.380, 0.410, 0.480, 0.470, 0.460, 0.440]
            KL=[0.060, 0.060, 0.060, 0.040, 0.040, 0.020, 0.020, 0, 0, 0, 0]
            XF=[1, 1, 1, 1, 1, 0.420, 0.370, 0, 0, 0, 0]
          SoilCrop canola
            LL=[0.290, 0.290, 0.320, 0.320, 0.350, 0.380, 0.410, 0.480, 0.470, 0.460, 0.440]
            KL=[0.060, 0.060, 0.060, 0.040, 0.040, 0.020, 0.010, 0, 0, 0, 0]
            XF=[1, 1, 1, 1, 1, 0.420, 0.370, 0, 0, 0, 0]
          SoilCrop barley
            LL=[0.290, 0.290, 0.320, 0.380, 0.390, 0.390, 0.410, 0.480, 0.470, 0.460, 0.440]
            KL=[0.070, 0.070, 0.070, 0.050, 0.050, 0.030, 0.020, 0, 0, 0, 0]
            XF=[1, 1, 1, 1, 1, 0.420, 0.370, 0, 0, 0, 0]
          SoilCrop chickpea
            LL=[0.290, 0.290, 0.360, 0.430, 0.510, 0.500, 0.500, 0.480, 0.470, 0.460, 0.440]
            KL=[0.060, 0.060, 0.060, 0.060, 0.060, 0.060, 0.060, 0, 0, 0, 0]
            XF=[1, 1, 1, 1, 1, 0.420, 0.370, 0, 0, 0, 0]
          SoilCrop fababean
            LL=[0.290, 0.290, 0.320, 0.320, 0.350, 0.380, 0.410, 0.480, 0.470, 0.460, 0.440]
            KL=[0.080, 0.080, 0.080, 0.080, 0.060, 0.040, 0.030, 0, 0, 0, 0]
            XF=[1, 1, 1, 1, 1, 0.420, 0.370, 0, 0, 0, 0]
          SoilCrop Cotton
            LL=[0.290, 0.290, 0.350, 0.360, 0.380, 0.390, 0.390, 0.480, 0.470, 0.460, 0.440]
            KL=[0.100, 0.100, 0.100, 0.100, 0.090, 0.070, 0.050, 0, 0, 0, 0]
            XF=[1, 1, 1, 1, 1, 0.420, 0.370, 0, 0, 0, 0]
          SoilCrop Sorghum
            LL=[0.290, 0.290, 0.350, 0.380, 0.400, 0.400, 0.400, 0.480, 0.470, 0.460, 0.440]
            KL=[0.070, 0.070, 0.070, 0.050, 0.050, 0.040, 0.030, 0, 0, 0, 0]
            XF=[1, 1, 1, 1, 1, 0.420, 0.370, 0, 0, 0, 0]
          SoilCrop Mungbean
            LL=[0.290, 0.290, 0.320, 0.320, 0.350, 0.380, 0.410, 0.480, 0.470, 0.460, 0.440]
            KL=[0.060, 0.060, 0.060, 0.040, 0.040, 0.010, 0.010, 0, 0, 0, 0]
            XF=[1, 1, 1, 1, 1, 0.420, 0.370, 0, 0, 0, 0]
          SoilCrop sunflowr
            LL=[0.290, 0.290, 0.320, 0.320, 0.350, 0.380, 0.410, 0.480, 0.470, 0.460, 0.440]
            KL=[0.100, 0.100, 0.080, 0.060, 0.040, 0.020, 0.010, 0, 0, 0, 0]
            XF=[1, 1, 1, 1, 1, 0.420, 0.370, 0, 0, 0, 0]
          SoilCrop Lucerne
            LL=[0.290, 0.290, 0.290, 0.290, 0.300, 0.310, 0.320, 0.330, 0.340, 0.350, 0.360]
            KL=[0.100, 0.100, 0.100, 0.100, 0.090, 0.090, 0.090, 0.090, 0.090, 0.090, 0.090]
            XF=[1, 1, 1, 1, 1, 0.420, 0.370, 0.330, 0.310, 0.310, 0.330]
          SoilCrop Maize
            LL=[0.290, 0.290, 0.340, 0.340, 0.370, 0.400, 0.420, 0.480, 0.470, 0.460, 0.440]
            KL=[0.060, 0.060, 0.060, 0.040, 0.040, 0.020, 0.010, 0, 0, 0, 0]
            XF=[1, 1, 1, 1, 1, 0.420, 0.370, 0, 0, 0, 0]
          SoilCrop Perennial Grass
            LL=[0.290, 0.290, 0.390, 0.410, 0.400, 0.400, 0.410, 0.410, 0.400, 0.400, 0.420]
            KL=[0.100, 0.100, 0.100, 0.100, 0.090, 0.070, 0.050, 0, 0, 0, 0]
            XF=[1, 1, 1, 1, 1, 0.420, 0.370, 0, 0, 0, 0]
          SoilCrop Cowpea: same as Canopy-edited.paddock.No000 SampleBlackVertosol (No000).Water.canola
          SoilCrop Navybean: same as Canopy-edited.paddock.No000 SampleBlackVertosol (No000).Water.Mungbean
          SoilCrop Peanut: same as Canopy-edited.paddock.No000 SampleBlackVertosol (No000).Water.Mungbean
          SoilCrop Pigeonpea
            LL=[0.290, 0.290, 0.320, 0.320, 0.350, 0.380, 0.410, 0.480, 0.470, 0.460, 0.440]
            KL=[0.060, 0.060, 0.060, 0.050, 0.040, 0.020, 0.010, 0, 0, 0, 0]
            XF=[1, 1, 1, 1, 1, 0.420, 0.370, 0, 0, 0, 0]
          SoilCrop Soybean: same as Canopy-edited.paddock.No000 SampleBlackVertosol (No000).Water.canola
          SoilCrop Stylo: same as Canopy-edited.paddock.No000 SampleBlackVertosol (No000).Water.sunflowr
          SoilCrop Sugar: same as Canopy-edited.paddock.No000 SampleBlackVertosol (No000).Water.sunflowr
          SoilCrop Lablab: same as Canopy-edited.paddock.No000 SampleBlackVertosol (No000).Water.sunflowr
        SoilWater: SummerCona=3.5; SummerU=6; SummerDate=1-Nov; WinterCona=3.5; WinterU=6; WinterDate=1-Apr; DiffusConst=40; DiffusSlope=16; Salb=0.12; CN2Bare=73; CNRed=20; CNCov=0.8; Thickness=[200, 200, 300, 300, 300, 300, 300, 300, 300, 300, 300]
          SWCON=[0.300, 0.300, 0.300, 0.300, 0.300, 0.300, 0.300, 0.300, 0.300, 0.300, 0.300]
        SoilOrganicMatter: RootCN=40; RootWt=1000; SoilCN=10; EnrACoeff=7.4; EnrBCoeff=0.2
          Thickness  OC     FBiom  FInert
          150        1.040  0.040  0.400
          150        0.890  0.020  0.600
          300        0.890  0.020  0.800
          300        0.890  0.020  1
          300        0.770  0.010  1
          300        0.450  0.010  1
          300        0.270  0.010  1
          300        0.220  0.010  1
          300        0.160  0.010  1
          300        0.130  0.010  1
          300        0.120  0.010  1
        Analysis
          Thickness  EC     PH
          150        0.200  8.400
          150        0.300  8.800
          300        0.300  9
          300        0.400  9.200
          300        0.600  9.200
          300        0.800  9.100
          300        0.900  9
          300        1      9
          300        1.100  8.900
          300        1.100  8.900
          300        1      8.900
        Sample Initial nitrogen
          Thickness  NO3  NH4
          150        6    1
          150        5    1
          300        3    0.900
          300        2    0.700
          300        1    0.200
          300        1    0.100
          300        1    0.010
          300        1    0.010
          300        1    0.010
          300        1    0.010
          300        1    0.010
        Sample Initial water: Thickness=[150, 150, 300, 300, 300, 300, 300, 300, 300, 300, 300]
          SW=[0.290, 0.290, 0.350, 0.360, 0.380, 0.390, 0.390, 0.480, 0.470, 0.460, 0.440]
      canopy
        intercrop = maize cowpea  # Enter crop names to intercrop
      cowpea
      maize
      manager Logic
        on start_of_day:
```
 ! MAIZE SOWING AND HARVEST ************
if day = 10 and year = 1988 then
      maize sow cultivar = dekalb_xl82, plants = 10, sowing_depth = 30 (mm)
endif

if (maize.stage = 11) then
      maize harvest
      maize end_crop
endif

! COWPEA SOWING AND HARVEST**********
if day = 10 and year  = 1988 then
   cowpea sow cultivar = banjo, plants = 25 (/m2), sowing_depth = 40 (mm)
endif

if cowpea.StageName = 'harvest_ripe' or cowpea.plant_status = 'dead' then
   cowpea harvest
   cowpea end_crop   
endif
```
      outputfile: filename=Canopy-edited.out; title=Canopy-edited
        variables
          variable:
            dd/mm/yyyy as Date  # Date (dd/mm/yyyy)
            sw_dep()  # Soil water - layered (mm)
            cowpea.lai as lai_cowpea  # Leaf area index
            maize.lai as lai_maize  # Maize Leaf area index
            canopy.cover_tot_sum
            cowpea.biomass as biom_cowpea  # Biomass
            maize.biomass as biom_maize  # Maize Total Above Ground Biomass (kg/ha)
        events Reporting Frequency: event=Daily  # End of daily simulation time step
